# OpenSim document version 20302
ForceSet gait2392_CMC:
  PointActuator FX: body=pelvis point=(-0.0724376 0 0) point_is_global=false direction=(1 0 0) force_is_global=true
      optimal_force=100
  PointActuator FY: body=pelvis point=(-0.0724376 0 0) point_is_global=false direction=(0 1 0) force_is_global=true
      optimal_force=200
  PointActuator FZ: body=pelvis point=(-0.0724376 0 0) point_is_global=false direction=(0 0 1) force_is_global=true
      optimal_force=100
  TorqueActuator MX: bodyA=pelvis bodyB=ground torque_is_global=true axis=(1 0 0) optimal_force=80
  TorqueActuator MY: bodyA=pelvis bodyB=ground torque_is_global=true axis=(0 1 0) optimal_force=80
  TorqueActuator MZ: bodyA=pelvis bodyB=ground torque_is_global=true axis=(0 0 1) optimal_force=80
  CoordinateActuator ABS_FE_reserve: coordinate=ABS_FE optimal_force=1
  CoordinateActuator ABS_LB_reserve: coordinate=ABS_LB optimal_force=1
  CoordinateActuator ABS_AR_reserve: coordinate=ABS_AR optimal_force=1
  CoordinateActuator L3_L4_FE_reserve: coordinate=L3_L4_FE optimal_force=1
  CoordinateActuator L3_L4_LB_reserve: coordinate=L3_L4_LB optimal_force=1
  CoordinateActuator L3_L4_AR_reserve: coordinate=L3_L4_AR optimal_force=1
  CoordinateActuator T5_T6_FE_reserve: coordinate=T5_T6_FE optimal_force=1
  CoordinateActuator T5_T6_LB_reserve: coordinate=T5_T6_LB optimal_force=1
  CoordinateActuator T5_T6_AR_reserve: coordinate=T5_T6_AR optimal_force=1
  CoordinateActuator shoulder_elv_r_reserve: coordinate=shoulder_elv_r optimal_force=1
  CoordinateActuator shoulder_rot_r_reserve: coordinate=shoulder_rot_r optimal_force=1
  CoordinateActuator elv_angle_r_reserve: coordinate=elv_angle_r optimal_force=1
  CoordinateActuator elbow_flexion_r_reserve: coordinate=elbow_flexion_r optimal_force=1
  CoordinateActuator pro_sup_r_reserve: coordinate=pro_sup_r optimal_force=1
  CoordinateActuator wrist_dev_r_reserve: coordinate=wrist_dev_r optimal_force=1
  CoordinateActuator wrist_flex_r_reserve: coordinate=wrist_flex_r optimal_force=1
  CoordinateActuator shoulder_elv_l_reserve: coordinate=shoulder_elv_l optimal_force=1
  CoordinateActuator shoulder_rot_l_reserve: coordinate=shoulder_rot_l optimal_force=1
  CoordinateActuator elv_angle_l_reserve: coordinate=elv_angle_l optimal_force=1
  CoordinateActuator elbow_flexion_l_reserve: coordinate=elbow_flexion_l optimal_force=1
  CoordinateActuator pro_sup_l_reserve: coordinate=pro_sup_l optimal_force=1
  CoordinateActuator wrist_dev_l_reserve: coordinate=wrist_dev_l optimal_force=1
  CoordinateActuator wrist_flex_l_reserve: coordinate=wrist_flex_l optimal_force=1
  CoordinateActuator hip_flexion_r_reserve: coordinate=hip_flexion_r optimal_force=1
  CoordinateActuator hip_adduction_r_reserve: coordinate=hip_adduction_r optimal_force=1
  CoordinateActuator hip_rotation_r_reserve: coordinate=hip_rotation_r optimal_force=1
  CoordinateActuator knee_angle_r_reserve: coordinate=knee_angle_r optimal_force=1
  CoordinateActuator knee_adduction_r_reserve: coordinate=knee_adduction_r optimal_force=1
  CoordinateActuator knee_rotation_r_reserve: coordinate=knee_rotation_r optimal_force=1
  CoordinateActuator ankle_angle_r_reserve: coordinate=ankle_angle_r optimal_force=1
  CoordinateActuator subtalar_angle_r_reserve: coordinate=subtalar_angle_r optimal_force=1
  CoordinateActuator mtp_angle_r_reserve: coordinate=mtp_angle_r optimal_force=100
  CoordinateActuator hip_flexion_l_reserve: coordinate=hip_flexion_l optimal_force=1
  CoordinateActuator hip_adduction_l_reserve: coordinate=hip_adduction_l optimal_force=1
  CoordinateActuator hip_rotation_l_reserve: coordinate=hip_rotation_l optimal_force=1
  CoordinateActuator knee_angle_l_reserve: coordinate=knee_angle_l optimal_force=1
  CoordinateActuator knee_adduction_l_reserve: coordinate=knee_adduction_l optimal_force=1
  CoordinateActuator knee_rotation_l_reserve: coordinate=knee_rotation_l optimal_force=1
  CoordinateActuator ankle_angle_l_reserve: coordinate=ankle_angle_l optimal_force=1
  CoordinateActuator subtalar_angle_l_reserve: coordinate=subtalar_angle_l optimal_force=1
  CoordinateActuator mtp_angle_l_reserve: coordinate=mtp_angle_l optimal_force=100
  CoordinateActuator lumbar_extension_reserve: coordinate=lumbar_extension optimal_force=1
  CoordinateActuator lumbar_bending_reserve: coordinate=lumbar_bending optimal_force=1
  CoordinateActuator lumbar_rotation_reserve: coordinate=lumbar_rotation optimal_force=1
