# OpenSim document version 40000
AnalyzeTool:
  replace_force_set: false
  results_directory: C:\Users\willi\Documents\GitHub\OpenSimMatlabBasic\SetupFiles\output\subject02
  output_precision: 8
  initial_time: 0
  final_time: 1.855
  solve_for_equilibrium_for_auxiliary_states: false
  maximum_number_of_integrator_steps: 20000
  maximum_integrator_step_size: 1
  minimum_integrator_step_size: 1e-8
  integrator_error_tolerance: 1e-5
  external_loads_file: C:\Users\willi\ucloud\PhD\Thera\OpenSim\..\Callum_labeling\02_Hannah\Gait01\GRF.xml
  coordinates_file: C:\Users\willi\Documents\GitHub\OpenSimMatlabBasic\SetupFiles\output\subject02\IK.mot
  lowpass_cutoff_frequency_for_coordinates: 6
  AnalysisSet Analyses:
    BodyKinematics: start_time=0 end_time=1.855 step_interval=1 in_degrees=true bodies=all
        express_results_in_body_local_frame=false
