# OpenSim document version 40500
InverseKinematicsTool:
  results_directory: ./
  constraint_weight: Inf
  accuracy: 1e-5
  time_range: 0 1
  report_errors: true
  marker_file: ../../../../ucloud/TreadmillTest/walking_4kmh_01/marker_experimental.trc
  report_marker_locations: true
  IKTaskSet:
    IKMarkerTask RASI: apply=true weight=1
    IKMarkerTask LASI: apply=true weight=1
    IKMarkerTask RPSI: apply=true weight=0
    IKMarkerTask RKNE: apply=true weight=1
    IKMarkerTask RANK: apply=true weight=1
    IKMarkerTask RHEE: apply=true weight=1
    IKMarkerTask RTOE: apply=true weight=1
    IKMarkerTask LKNE: apply=true weight=1
    IKMarkerTask LANK: apply=true weight=1
    IKMarkerTask LHEE: apply=true weight=1
    IKMarkerTask LTOE: apply=true weight=1
    IKMarkerTask RTHI: apply=true weight=1
    IKMarkerTask LTHI: apply=true weight=1
    IKMarkerTask RTIB: apply=false weight=1
    IKMarkerTask LTIB: apply=false weight=1
    IKMarkerTask LPSI: apply=true weight=0
