# OpenSim document version 40000
AnalyzeTool:
  replace_force_set: false
  force_set_files: models/subject02_actuators.xml
  results_directory: output/subject02
  output_precision: 8
  initial_time: 0
  final_time: 1.855
  solve_for_equilibrium_for_auxiliary_states: false
  maximum_number_of_integrator_steps: 20000
  maximum_integrator_step_size: 1
  minimum_integrator_step_size: 1e-8
  integrator_error_tolerance: 1e-5
  external_loads_file: C:/Users/willi/ucloud/PhD/Thera/OpenSim/../Callum_labeling/02_Hannah/Gait01/GRF.xml
  coordinates_file: output/subject02/IK.mot
  lowpass_cutoff_frequency_for_coordinates: 6
  AnalysisSet Analyses:
    StaticOptimization: start_time=0 end_time=1.855 step_interval=10 in_degrees=true use_model_force_set=true
        activation_exponent=2 use_muscle_physiology=true optimizer_convergence_criterion=0.0001
        optimizer_max_iterations=100
