# OpenSim document version 40000
InverseKinematicsTool:
  results_directory: ./
  constraint_weight: Inf
  accuracy: 1e-5
  time_range: 0 1
  report_errors: true
  marker_file: C:/Users/willi/ucloud/PhD/Study_HJCF_magn_orient/Models/../PhD_3DGAdata/CP01/3DGAIT_B_W5/marker_experimental.trc
  report_marker_locations: true
  IKTaskSet:
    IKMarkerTask T2: apply=false weight=1
    IKMarkerTask T10: apply=false weight=1
    IKMarkerTask CLAV: apply=false weight=1
    IKMarkerTask RBAK: apply=false weight=1
    IKMarkerTask RASI: apply=true weight=1
    IKMarkerTask LASI: apply=true weight=1
    IKMarkerTask LPSI: apply=true weight=1
    IKMarkerTask RTHI: apply=true weight=1
    IKMarkerTask RTHAP: apply=true weight=1
    IKMarkerTask RTHAD: apply=true weight=1
    IKMarkerTask RKNE: apply=false weight=1
    IKMarkerTask RKNM: apply=false weight=1
    IKMarkerTask RTIB: apply=true weight=1
    IKMarkerTask RTIAP: apply=true weight=1
    IKMarkerTask RTIAD: apply=true weight=1
    IKMarkerTask RANK: apply=false weight=1
    IKMarkerTask RMED: apply=false weight=1
    IKMarkerTask RHEE: apply=true weight=1
    IKMarkerTask RVMH: apply=true weight=1
    IKMarkerTask RTOE: apply=false weight=1
    IKMarkerTask LTHI: apply=true weight=1
    IKMarkerTask LTHAP: apply=true weight=1
    IKMarkerTask LTHAD: apply=true weight=1
    IKMarkerTask LHJC: apply=false weight=1
    IKMarkerTask LTIBIAP: apply=false weight=1
    IKMarkerTask LKNE: apply=false weight=1
    IKMarkerTask LKNM: apply=false weight=1
    IKMarkerTask LTIB: apply=true weight=1
    IKMarkerTask LTIAP: apply=true weight=1
    IKMarkerTask LTIAD: apply=true weight=1
    IKMarkerTask LANK: apply=false weight=1
    IKMarkerTask LMED: apply=false weight=1
    IKMarkerTask LHEE: apply=true weight=1
    IKMarkerTask LVMH: apply=true weight=1
    IKMarkerTask LTOE: apply=false weight=1
    IKMarkerTask RHJC: apply=false weight=1
    IKMarkerTask RTIBIAP: apply=false weight=1
    IKMarkerTask LTIBIAO: apply=false weight=1
    IKMarkerTask RTIBIAO: apply=false weight=1
    IKMarkerTask RPSI: apply=true weight=1
    IKMarkerTask RFMH: apply=true weight=1
    IKMarkerTask RSMH: apply=false weight=1
    IKMarkerTask LFMH: apply=true weight=1
    IKMarkerTask LSMH: apply=false weight=1
