# OpenSim document version 40000
InverseKinematicsTool:
  results_directory: ./
  constraint_weight: Inf
  accuracy: 1e-5
  time_range: 0 1
  report_errors: true
  marker_file: C:/Users/willi/ucloud/PhD/Study_HJCF_magn_orient/Models/../PhD_3DGAdata/CP01/3DGAIT_B_W5/marker_experimental.trc
  report_marker_locations: true
  IKTaskSet:
    IKMarkerTask Sternum: apply=false weight=1
    IKMarkerTask C7: apply=false weight=1
    IKMarkerTask T10: apply=false weight=1
    IKMarkerTask Clav: apply=false weight=1
    IKMarkerTask Right_Back: apply=false weight=1
    IKMarkerTask RASI: apply=true weight=1
    IKMarkerTask LASI: apply=true weight=1
    IKMarkerTask RPSI: apply=true weight=1
    IKMarkerTask LPSI: apply=true weight=1
    IKMarkerTask RTH1: apply=true weight=1
    IKMarkerTask RTH2: apply=true weight=1
    IKMarkerTask RTH3: apply=true weight=1
    IKMarkerTask RKNE: apply=false weight=1
    IKMarkerTask RMKNE: apply=false weight=1
    IKMarkerTask RPAT: apply=false weight=1
    IKMarkerTask RTB1: apply=true weight=1
    IKMarkerTask RTB2: apply=true weight=1
    IKMarkerTask RTB3: apply=true weight=1
    IKMarkerTask RANK: apply=false weight=1
    IKMarkerTask RMMA: apply=false weight=1
    IKMarkerTask RHEE: apply=true weight=1
    IKMarkerTask RD5M: apply=true weight=1
    IKMarkerTask RTOE: apply=true weight=1
    IKMarkerTask LTH1: apply=true weight=1
    IKMarkerTask LTH2: apply=true weight=1
    IKMarkerTask LTH3: apply=true weight=1
    IKMarkerTask LKNE: apply=false weight=1
    IKMarkerTask LMKNE: apply=false weight=1
    IKMarkerTask LPAT: apply=false weight=1
    IKMarkerTask LTB1: apply=true weight=1
    IKMarkerTask LTB2: apply=true weight=1
    IKMarkerTask LTB3: apply=true weight=1
    IKMarkerTask LANK: apply=false weight=1
    IKMarkerTask LMMA: apply=false weight=1
    IKMarkerTask LHEE: apply=true weight=1
    IKMarkerTask LD5M: apply=true weight=1
    IKMarkerTask LTOE: apply=true weight=1
    IKMarkerTask RTHI: apply=false weight=1
    IKMarkerTask LTHI: apply=false weight=1
    IKMarkerTask RTIB: apply=false weight=1
    IKMarkerTask LTIB: apply=false weight=1
